# -*- coding: utf-8 -*-
from stlib.visuals import ShowGrid
from stlib.physics.rigid import Floor
from stlib.physics.rigid import Cube

def createScene(rootNode):
    """This is my first scene"""
    ShowGrid(rootNode)

    Floor(rootNode,
          translation=[0.0,-160.0,0.0],
          isAStaticObject=True)

    Cube(rootNode,
          translation=[0.0,0.0,0.0],
          uniformScale=20,
          color=[1.0,0.0,0.0])

    return rootNode
