# -*- coding: utf-8 -*-
"""
Step 4:
4-1 Adding the ActuatedArm prefab.
    This prefab is defining the servomotor, the servo-arm and the constraint that attaches the end of the arm to the deformable object.
4-2 Rigidify extremity of deformable part to be able to fix it to the actuated arms
4-3 Fix arms to deformable part
"""
from tutorial import *
# Let's define a Tripod prefab in tripod.py, that we can later call in the createScene function
from tripod import Tripod


def createScene(rootNode):
    from stlib3.scene import Scene

    scene = Scene(rootNode, gravity=[0.0, -9810, 0.0], plugins=['SofaSparseSolver', 'SofaOpenglVisual', 'SofaSimpleFem', 'SofaDeformable', 'SofaGeneralRigid', 'SofaMiscMapping', 'SofaRigid'])
    scene.addMainHeader()
    scene.addObject('DefaultAnimationLoop')
    scene.addObject('DefaultVisualManagerLoop')
    rootNode.dt = 0.025

    scene.VisualStyle.displayFlags = "showBehavior"

    tripod = Tripod(scene.Modelling)
    tripod.BoxROI0.drawBoxes = True
    tripod.BoxROI1.drawBoxes = True
    tripod.BoxROI2.drawBoxes = True

    scene.Simulation.addChild(tripod.RigidifiedStructure)
    motors = scene.Simulation.addChild("Motors")
    motors.addChild(tripod.ActuatedArm0)
    motors.addChild(tripod.ActuatedArm1)
    motors.addChild(tripod.ActuatedArm2)
