# -*- coding: utf-8 -*-
"""
Step 5: Adding a controller.
The controller will connect user actions to the simulated behaviour.
"""
import Sofa
from stlib3.scene import Scene

#from tutorial import *
from tripod import Tripod

"""
The controller is implemented in this file: tripodcontroller.py
"""
from tripodcontroller import TripodController

class MyController(Sofa.Core.Controller):
    def __init__(self, *args, **kwargs):
        # These are needed (and the normal way to override from a python class)
        Sofa.Core.Controller.__init__(self, *args, **kwargs)

        def onKeypressedEvent(self, key):
                print("Key Pressed")

def createScene(rootNode):

    scene = Scene(rootNode, gravity=[0., -9810., 0.],dt=0.025, plugins=["SofaSparseSolver",'SofaDeformable', 'SofaEngine', 'SofaGeneralRigid', 'SofaMiscMapping', 'SofaRigid'])
    scene.addMainHeader()
    scene.addObject('DefaultAnimationLoop')
    scene.addObject('DefaultVisualManagerLoop')

    scene.VisualStyle.displayFlags = "showBehavior"

    tripod = scene.Modelling.addChild(Tripod())

    scene.addObject(TripodController(name="TripodController",actuators=[tripod.ActuatedArm0, tripod.ActuatedArm1, tripod.ActuatedArm2]))

    scene.Simulation.addChild(tripod.RigidifiedStructure)
    motors = scene.Simulation.addChild("Motors")
    motors.addChild(tripod.ActuatedArm0)
    motors.addChild(tripod.ActuatedArm1)
    motors.addChild(tripod.ActuatedArm2)
