<Node name="root" dt="0.01">

        <VisualStyle displayFlags='showCollision showVisualModels showForceFields showInteractionForceFields hideCollisionModels hideBoundingCollisionModels hideWireframe'/>

        <RequiredPlugin pluginName='Sofa.Component.AnimationLoop'/>
        <RequiredPlugin pluginName='Sofa.Component.LinearSolver.Direct'/>

        <FreeMotionAnimationLoop/>
        <CollisionPipeline verbose='0'/>
        <BruteForceBroadPhase name="N2" />
        <BVHNarrowPhase />
        <CollisionResponse response='FrictionContactConstraint'/>
        <LocalMinDistance name="Proximity" alarmDistance='3' contactDistance='0.5'/>
        <GenericConstraintSolver name="GenericConstraintSolver" maxIterations='250' printLog='0' tolerance = '0.0000001'/>


        <Node name='bunny'>
                <EulerImplicitSolver firstOrder="0"/>
                <SparseLDLSolver />
                <MeshVTKLoader name="loader" filename="mesh/Hollow_Stanford_Bunny.vtu"/>
                <TetrahedronSetTopologyContainer src="@loader"/>
                <MechanicalObject name="tetras" template="Vec3d"/>
                <UniformMass totalMass="0.5"/>
                <TetrahedronFEMForceField youngModulus="18000" poissonRatio='0.3' method='large'/>

                <BoxROI name='ROI1' box='-5 -15 -5  5 -4.5 5' drawBoxes='true'/>
                <RestShapeSpringsForceField indices='@ROI1.indices' stiffness='1e12'/>

                <LinearSolverConstraintCorrection/>

                <Node name="cavity">
                        <MeshOBJLoader name="loader" filename='mesh/Hollow_Bunny_Body_Cavity.obj'/>
                        <MeshTopology name="topo" src='@loader'/>
                        <MechanicalObject name="cavity" />

                        <SurfacePressureConstraint  name="SurfacePressureConstraint" value='40' valueType="1"/>
                        <VolumeFromTriangles name="VolumeFromTriangles"/>

                        <BarycentricMapping mapForces="false" mapMasses="false"/>
                </Node>
        </Node>

</Node>
